OpenVSP model (file version 5), 1 components.
Geometry view with OpenVSP parameter names; values to 6 digits, angles in degrees, lengths in the model's unit.
Overall bounding box: X_Min=-1.96274e-05 X_Len=0.915369 Y_Min=-0.4572 Y_Len=0.9144 Z_Min=-0.0137792 Z_Len=0.126562

Wing "WingGeom"
  location (X Y Z) 0 0 0, rotation 0 0 0
  symmetric about XZ
  bounding box size 0.915369 0.9144 0.126562
  totals: TotalSpan=0.9144 TotalProjectedSpan=0.9144 TotalChord=0.5072 TotalArea=0.463784 TotalAR=1.80284 MAC=0.616916
  root: chord 0.9144, twist 0, airfoil file "DAE-21 AIRFOIL"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 BaseThickChord=0.117761 ThickChord=0.117761
  sections:
    n  Span    Root_Chord  Tip_Chord  Area      Sweep    Sweep_Location  Dihedral  Twist  Twist_Location  tip airfoil
    1  0.4572  0.9144      0.1        0.231892  25.4286  0.715           0         1      0.25            as above

User parameters
  Default_Group:chord_length = 0.914  (Default_Desc)

Advanced link "Chord_Length"
  input Chord_Length_Parameter = UserParm:Default_Group:chord_length
  output Chord_Length = WingGeom:XSec_0:Root_Chord
    Chord_Length = Chord_Length_Parameter;
