OpenVSP model (file version 5), 1 components.
Geometry view with OpenVSP parameter names; values to 6 digits, angles in degrees, lengths in the model's unit.
Overall bounding box: X_Min=0 X_Len=16.5548 Y_Min=-9.14 Y_Len=18.28 Z_Min=-0.457621 Z_Len=0.915243

Wing "WingGeom"
  location (X Y Z) 0 0 0, rotation 0 0 0
  symmetric about XZ
  bounding box size 16.5548 18.28 0.915243
  totals: TotalSpan=18.28 TotalProjectedSpan=18.28 TotalChord=9.14 TotalArea=167.079 TotalAR=2 MAC=11.1451
  root: chord 16.5548, twist 0, edit curve Width=16.5548 Height=0.914 AbsoluteFlag=0 SymType=0 cubic Bezier points (X Y): 0.5 0, 0.332039 -0.196388, 0.16357 -0.353617, -0.00530009 -0.442893, -0.089735 -0.487531, -0.174322 -0.514634, -0.258846 -0.493014, -0.301108 -0.482204, -0.343381 -0.460018, -0.385353 -0.40932, -0.427325 -0.358622, -0.5 -0.421749, -0.5 0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
  sections:
    n  Span  Root_Chord  Tip_Chord  Area     Sweep  Sweep_Location  Dihedral  Twist  Twist_Location  tip airfoil
    1  9.14  16.5548     1.72521    83.5396  0      0.996429        0         0      0.25            NACA 4-series Camber=0.01 CamberLoc=0.4 ThickChord=0.1
